Thu Aug  7 19:05:36 EDT 2025
$PROBLEM    PKPD (IPP)
$INPUT      ID DOSE CYCLE TIME DAY DVID DV MDV EVID AMT RATE DUR ADDL
            II IL6BSL BSLFL G1 G2 G3 G2_3 ICL IV1 IQ IV2
$DATA      pkpd02.csv IGNORE=@ IGNORE(DVID.EQ.1) IGNORE(BSLFL.EQ.1)
$SUBROUTINE ADVAN13 TOL=6
$MODEL      COMP=(CENT) COMP=(PERI) COMP=(PKAUCCOMP) COMP=(IL6AUCCOMP)
            COMP=(IL6RELEASE) COMP=(IL6TRANS1) COMP=(IL6TRANS2)
            COMP=(IL6TRANS3) COMP=(IL6TRANS4) COMP=(IL6TRANS5)
            COMP=(IL6CIRC)
$PK
; Number of dose---------------------
IF(NEWIND.LE.1) NDOSE = 1                        ; NDOSE=0 (B1 method), NDOSE=1 (B2 method)
IF(NEWIND.EQ.2.AND.EVID.EQ.1) NDOSE = NDOSE + 1
NEWIND2 = NEWIND

; PK--------------------------------------
CL = ICL ; (L/h)
V1 = IV1 ; (L)
Q  = IQ ; (L/h)
V2 = IV2 ; (L)

S1 = V1
S2 = V2

K12 = Q/V1
K21 = Q/V2
K = CL/V1

; PD-------------------------------------
TVEMAX = THETA(1)
EMAX = TVEMAX * EXP(ETA(1)) ; (pg/mL/h)

TVEC50 = THETA(2)
EC50 = TVEC50 * EXP(ETA(2)) ; (ug/mL)

TVHILL = THETA(3)
HILL = TVHILL * EXP(ETA(3))

TVIMAX = THETA(4)
IMAX = TVIMAX * EXP(ETA(4))

TVIC50 = THETA(5)
IC50 = TVIC50 * EXP(ETA(5)) ; (pg*h/mL)

TVKDEG = THETA(6)
KDEG = TVKDEG * EXP(ETA(6)) ; (/h)

TVKPRIM = THETA(7)
KPRIM = TVKPRIM * EXP(ETA(7))

TVMTT = THETA(8)
MTT = TVMTT * EXP(ETA(8)) ; (h)

PROPERR = THETA(9)
ADDERR = THETA(10)

; Assume baseline deviates from observed value by the same variability of residual error
REWT = SQRT(ADDERR**2 + (PROPERR**2)*(IL6BSL**2))
IL6BASE = IL6BSL + REWT*ETA(9)

A_0(4) = 0
A_0(5) = IL6BASE
A_0(6) = IL6BASE
A_0(7) = IL6BASE
A_0(8) = IL6BASE
A_0(9) = IL6BASE
A_0(10) = IL6BASE
A_0(11) = IL6BASE

KTR = 5/MTT

$DES
; PK--------------------------------------------
CP = A(1)/S1 ; Drug concentration
PKAUC = A(3) ; cumulative drug AUC

DADT(1) = - K*A(1) - K12*A(1) + K21*A(2)
DADT(2) = K12*A(1) - K21*A(2)
DADT(3) = CP

; PD--------------------------------------------
IL6 = A(11) ; IL6 concentration
IL6AUC = A(4) ; cumulative IL6 AUC

RL = EMAX*(CP**HILL)/(EC50**HILL + CP**HILL)
IH = IMAX * IL6AUC / ((IC50/(KPRIM**(NDOSE-1))) + IL6AUC)

DADT(4) = IL6
DADT(5) = KDEG*IL6BASE + RL*(1-IH) -KTR*A(5)
DADT(6) = KTR*A(5) - KTR*A(6)
DADT(7) = KTR*A(6) - KTR*A(7)
DADT(8) = KTR*A(7) - KTR*A(8)
DADT(9) = KTR*A(8) - KTR*A(9)
DADT(10) = KTR*A(9) - KTR*A(10)
DADT(11) = KTR*A(10) - KDEG*A(11)

$ERROR
CONC = A(1)/S1 ; drug concentration
IL6CONC = A(11) ; IL6 concentration

IPRED = A(11)
IRES  = DV-IPRED
W = SQRT(IPRED*IPRED*PROPERR**2 + ADDERR**2)
IWRES = IRES/(W+1E-33)
Y = IPRED + W*EPS(1)

$THETA  (0,150) ; TVEMAX
 (0,3) ; TVEC50
 (0,2.5) ; TVHILL
 (0,0.75,1) ; TVIMAX
 (0,8000) ; TVIC50
 (0,0.3) ; TVKDEG
 (0,4) ; TVKPRIM
 (0,0.5) ; TVMTT
 (0,0.1) ; PROP_ERR_IL6
 0 FIX ; ADD_ERR_IL6
$OMEGA  0  FIX  ;   IIV_EMAX
 0.1  ;   IIV_EC50
 0.1  ;   IIV_HILL
 0  FIX  ;   IIV_IMAX
 0  FIX  ;   IIV_IC50
 0  FIX  ;   IIV_KDEG
 0  FIX  ;  IIV_KPRIM
 0  FIX  ;    IIV_MTT
 1  FIX  ; Dummy (IL6BASE)
$SIGMA  1  FIX  ;      DUMMY
$ESTIMATION METHOD=0 POSTHOC MAXEVAL=9999 PRINT=1 ETASTYPE=1
$COVARIANCE PRINT=E MATRIX=S
$TABLE      ID DOSE CYCLE TIME DAY DVID MDV IPRED IWRES CWRES NPDE
            NOPRINT ONEHEADER ESAMPLE=1000 FILE=sdtab001
            FORMAT=,1PE15.8
$TABLE      ID DOSE TIME CL V1 Q V2 EMAX EC50 HILL IMAX IC50 KDEG
            KPRIM IL6BASE MTT ETAS(1:LAST) NEWIND2 NDOSE PKAUC IL6AUC
            RL IH CP IL6 NOPRINT NOAPPEND ONEHEADER FILE=patab001
            FORMAT=,1PE15.8
;---------------------------------------------

; THE END OF PROGRAM

;---------------------------------------------

NM-TRAN MESSAGES
 WARNINGS AND ERRORS (IF ANY) FOR PROBLEM    1
 (WARNING  2) NM-TRAN INFERS THAT THE DATA ARE POPULATION.
 (WARNING  48) DES-DEFINED ITEMS ARE COMPUTED ONLY WHEN EVENT TIME
 INCREASES. E.G., DISPLAYED VALUES ASSOCIATED WITH THE FIRST EVENT RECORD
 OF AN INDIVIDUAL RECORD ARE COMPUTED WITH (THE LAST ADVANCE TO) AN EVENT
 TIME OF THE PRIOR INDIVIDUAL RECORD.
Note: Analytical 2nd Derivatives are constructed in FSUBS but are never used.
      You may insert $ABBR DERIV2=NO after the first $PROB to save FSUBS construction and compilation time

1NONLINEAR MIXED EFFECTS MODEL PROGRAM (NONMEM) VERSION 7.5.1
 ORIGINALLY DEVELOPED BY STUART BEAL, LEWIS SHEINER, AND ALISON BOECKMANN
 CURRENT DEVELOPERS ARE ROBERT BAUER, ICON DEVELOPMENT SOLUTIONS,
 AND ALISON BOECKMANN. IMPLEMENTATION, EFFICIENCY, AND STANDARDIZATION
 PERFORMED BY NOUS INFOSYSTEMS.
 PROBLEM NO.:         1
 PKPD (IPP)
 TOT. NO. OF OBS RECS:      936
 TOT. NO. OF INDIVIDUALS:       24
 GENERAL NONLINEAR KINETICS MODEL WITH STIFF/NONSTIFF EQUATIONS (LSODA, ADVAN13)
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 #TBLN:      1
 #METH: First Order
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
 #TERM:
0MINIMIZATION SUCCESSFUL
 HOWEVER, PROBLEMS OCCURRED WITH THE MINIMIZATION.
 REGARD THE RESULTS OF THE ESTIMATION STEP CAREFULLY, AND ACCEPT THEM ONLY
 AFTER CHECKING THAT THE COVARIANCE STEP PRODUCES REASONABLE OUTPUT.
 NO. OF FUNCTION EVALUATIONS USED:      456
 NO. OF SIG. DIGITS IN FINAL EST.:  3.0

 TOTAL DATA POINTS NORMALLY DISTRIBUTED (N):          936
 N*LOG(2PI) CONSTANT TO OBJECTIVE FUNCTION:    1720.2529341591473
 OBJECTIVE FUNCTION VALUE WITHOUT CONSTANT:    1332.8471606285539
 OBJECTIVE FUNCTION VALUE WITH CONSTANT:       3053.1000947877010
 REPORTED OBJECTIVE FUNCTION DOES NOT CONTAIN CONSTANT

 TOTAL EFFECTIVE ETAS (NIND*NETA):                            72


 #TERE:
 Elapsed estimation  time in seconds:   182.62
 Elapsed covariance  time in seconds:     7.87
 Elapsed postprocess time in seconds:    93.77

 ********************                                   FIRST ORDER                                  ********************
 #OBJT:**************                       MINIMUM VALUE OF OBJECTIVE FUNCTION                      ********************
 #OBJV:********************************************     1332.847       **************************************************

 ********************                                   FIRST ORDER                                  ********************
 ********************                             FINAL PARAMETER ESTIMATE                           ********************

 THETA - VECTOR OF FIXED EFFECTS PARAMETERS   *********
         TH 1      TH 2      TH 3      TH 4      TH 5      TH 6      TH 7      TH 8      TH 9      TH10
         2.62E+02  3.83E+00  1.60E+00  7.43E-01  9.26E+03  2.97E-01  4.90E+00  4.67E-01  1.38E-01  0.00E+00

 OMEGA - COV MATRIX FOR RANDOM EFFECTS - ETAS  ********
         ETA1      ETA2      ETA3      ETA4      ETA5      ETA6      ETA7      ETA8      ETA9
 ETA1
+        0.00E+00
 ETA2
+        0.00E+00  2.92E-01
 ETA3
+        0.00E+00  0.00E+00  8.09E-02
 ETA4
+        0.00E+00  0.00E+00  0.00E+00  0.00E+00
 ETA5
+        0.00E+00  0.00E+00  0.00E+00  0.00E+00  0.00E+00
 ETA6
+        0.00E+00  0.00E+00  0.00E+00  0.00E+00  0.00E+00  0.00E+00
 ETA7
+        0.00E+00  0.00E+00  0.00E+00  0.00E+00  0.00E+00  0.00E+00  0.00E+00
 ETA8
+        0.00E+00  0.00E+00  0.00E+00  0.00E+00  0.00E+00  0.00E+00  0.00E+00  0.00E+00
 ETA9
+        0.00E+00  0.00E+00  0.00E+00  0.00E+00  0.00E+00  0.00E+00  0.00E+00  0.00E+00  1.00E+00

 SIGMA - COV MATRIX FOR RANDOM EFFECTS - EPSILONS  ****
         EPS1
 EPS1
+        1.00E+00

 OMEGA - CORR MATRIX FOR RANDOM EFFECTS - ETAS  *******
         ETA1      ETA2      ETA3      ETA4      ETA5      ETA6      ETA7      ETA8      ETA9
 ETA1
+        0.00E+00
 ETA2
+        0.00E+00  5.40E-01
 ETA3
+        0.00E+00  0.00E+00  2.84E-01
 ETA4
+        0.00E+00  0.00E+00  0.00E+00  0.00E+00
 ETA5
+        0.00E+00  0.00E+00  0.00E+00  0.00E+00  0.00E+00
 ETA6
+        0.00E+00  0.00E+00  0.00E+00  0.00E+00  0.00E+00  0.00E+00
 ETA7
+        0.00E+00  0.00E+00  0.00E+00  0.00E+00  0.00E+00  0.00E+00  0.00E+00
 ETA8
+        0.00E+00  0.00E+00  0.00E+00  0.00E+00  0.00E+00  0.00E+00  0.00E+00  0.00E+00
 ETA9
+        0.00E+00  0.00E+00  0.00E+00  0.00E+00  0.00E+00  0.00E+00  0.00E+00  0.00E+00  1.00E+00

 SIGMA - CORR MATRIX FOR RANDOM EFFECTS - EPSILONS  ***
         EPS1
 EPS1
+        1.00E+00

 ********************                                   FIRST ORDER                                  ********************
 ********************                            STANDARD ERROR OF ESTIMATE                          ********************

 THETA - VECTOR OF FIXED EFFECTS PARAMETERS   *********
         TH 1      TH 2      TH 3      TH 4      TH 5      TH 6      TH 7      TH 8      TH 9      TH10
         4.64E+01  5.80E-01  1.24E-02  4.88E-03  4.35E+02  7.98E-03  4.14E-01  9.36E-03  4.03E-03 .........

 OMEGA - COV MATRIX FOR RANDOM EFFECTS - ETAS  ********
         ETA1      ETA2      ETA3      ETA4      ETA5      ETA6      ETA7      ETA8      ETA9
 ETA1
+       .........
 ETA2
+       .........  2.77E-01
 ETA3
+       ......... .........  5.10E-02
 ETA4
+       ......... ......... ......... .........
 ETA5
+       ......... ......... ......... ......... .........
 ETA6
+       ......... ......... ......... ......... ......... .........
 ETA7
+       ......... ......... ......... ......... ......... ......... .........
 ETA8
+       ......... ......... ......... ......... ......... ......... ......... .........
 ETA9
+       ......... ......... ......... ......... ......... ......... ......... ......... .........

 SIGMA - COV MATRIX FOR RANDOM EFFECTS - EPSILONS  ****
         EPS1
 EPS1
+       .........

 OMEGA - CORR MATRIX FOR RANDOM EFFECTS - ETAS  *******
         ETA1      ETA2      ETA3      ETA4      ETA5      ETA6      ETA7      ETA8      ETA9
 ETA1
+       .........
 ETA2
+       .........  2.57E-01
 ETA3
+       ......... .........  8.96E-02
 ETA4
+       ......... ......... ......... .........
 ETA5
+       ......... ......... ......... ......... .........
 ETA6
+       ......... ......... ......... ......... ......... .........
 ETA7
+       ......... ......... ......... ......... ......... ......... .........
 ETA8
+       ......... ......... ......... ......... ......... ......... ......... .........
 ETA9
+       ......... ......... ......... ......... ......... ......... ......... ......... .........

 SIGMA - CORR MATRIX FOR RANDOM EFFECTS - EPSILONS  ***
         EPS1
 EPS1
+       .........
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
 ********************                                   FIRST ORDER                                  ********************
 ********************                      EIGENVALUES OF COR MATRIX OF ESTIMATE                     ********************

             1         2         3         4         5         6         7         8         9        10        11
         5.87E-04  2.21E-02  4.09E-02  2.01E-01  2.80E-01  4.75E-01  5.91E-01  7.62E-01  1.40E+00  2.48E+00  4.75E+00
 Elapsed finaloutput time in seconds:     0.12
 #CPUT: Total CPU Time in Seconds,      284.938
