Wed Aug  6 19:54:32 EDT 2025
$PROBLEM    PPK model
$INPUT      ID DOSE CYCLE TIME DAY DVID DV MDV EVID AMT RATE DUR ADDL
            II
$DATA      pkpd01.csv IGNORE=@ IGNORE(DVID.EQ.2)
$SUBROUTINE ADVAN3 TRANS4
$PK
TVCL = THETA(1)
CL = TVCL * EXP(ETA(1)) ; (L/h)

TVV1 = THETA(2)
V1 = TVV1 * EXP(ETA(2)) ; (L)

TVQ = THETA(3)
Q = TVQ * EXP(ETA(3)) ; (L/h)

TVV2 = THETA(4)
V2 = TVV2 * EXP(ETA(4)) ; (L)

S1 = V1
S2 = V2

K12 = Q/V1
K21 = Q/V2
K = CL/V1

$ERROR
IPRED = F
IRES  = DV-IPRED
W = SQRT(F*F*THETA(5)**2 + THETA(6)**2)
IWRES = IRES/(W+1E-33)
Y = IPRED + W*EPS(1)

$THETA  (0,0.02) ; TVCL
 (0,3) ; TVV1
 (0,0.05) ; TVQ
 (0,3) ; TVV2
 (0,0.1) ; PROP_ERR
 0 FIX ; ADD_ERR
$OMEGA  0.1  ;     IIV_CL
 0.1  ;     IIV_V1
 0.1  ;      IIV_Q
 0.1  ;     IIV_V2
$SIGMA  1  FIX  ;      DUMMY
$ESTIMATION METHOD=1 INTER MAXEVAL=9999 PRINT=5 ETASTYPE=1
$COVARIANCE PRINT=E
$TABLE      ID DOSE CYCLE TIME DAY DVID MDV IPRED IWRES CWRES NPDE
            NOPRINT ONEHEADER ESAMPLE=1000 FILE=sdtab000
            FORMAT=,1PE15.8
$TABLE      ID DOSE CL V1 Q V2 ETAS(1:LAST) NOPRINT NOAPPEND ONEHEADER
            FILE=patab000 FORMAT=,1PE15.8
;---------------------------------------------

; THE END OF PROGRAM

;---------------------------------------------

NM-TRAN MESSAGES
 WARNINGS AND ERRORS (IF ANY) FOR PROBLEM    1
 (WARNING  2) NM-TRAN INFERS THAT THE DATA ARE POPULATION.
Note: Analytical 2nd Derivatives are constructed in FSUBS but are never used.
      You may insert $ABBR DERIV2=NO after the first $PROB to save FSUBS construction and compilation time

1NONLINEAR MIXED EFFECTS MODEL PROGRAM (NONMEM) VERSION 7.5.1
 ORIGINALLY DEVELOPED BY STUART BEAL, LEWIS SHEINER, AND ALISON BOECKMANN
 CURRENT DEVELOPERS ARE ROBERT BAUER, ICON DEVELOPMENT SOLUTIONS,
 AND ALISON BOECKMANN. IMPLEMENTATION, EFFICIENCY, AND STANDARDIZATION
 PERFORMED BY NOUS INFOSYSTEMS.
 PROBLEM NO.:         1
 PPK model
 TOT. NO. OF OBS RECS:      936
 TOT. NO. OF INDIVIDUALS:       24
 TWO COMPARTMENT MODEL (ADVAN3)
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 #TBLN:      1
 #METH: First Order Conditional Estimation with Interaction
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
 #TERM:
0MINIMIZATION SUCCESSFUL
 NO. OF FUNCTION EVALUATIONS USED:      229
 NO. OF SIG. DIGITS IN FINAL EST.:  3.1

 ETABAR IS THE ARITHMETIC MEAN OF THE ETA-ESTIMATES,
 AND THE P-VALUE IS GIVEN FOR THE NULL HYPOTHESIS THAT THE TRUE MEAN IS 0.

 ETABAR:         6.2548E-04 -1.6046E-03  2.7376E-03  4.7931E-03
 SE:             7.6909E-02  7.3783E-02  5.2930E-02  5.5651E-02
 N:                      24          24          24          24

 P VAL.:         9.9351E-01  9.8265E-01  9.5875E-01  9.3136E-01

 ETASHRINKSD(%)  1.4201E-01  4.4195E-01  1.5425E+01  5.9459E+00
 ETASHRINKVR(%)  2.8382E-01  8.8195E-01  2.8471E+01  1.1538E+01
 EBVSHRINKSD(%)  1.6209E-01  3.4897E-01  1.5440E+01  5.3485E+00
 EBVSHRINKVR(%)  3.2391E-01  6.9672E-01  2.8497E+01  1.0411E+01
 RELATIVEINF(%)  9.9674E+01  9.9269E+01  7.1478E+01  8.9585E+01
 EPSSHRINKSD(%)  4.6157E+00
 EPSSHRINKVR(%)  9.0183E+00


 TOTAL DATA POINTS NORMALLY DISTRIBUTED (N):          936
 N*LOG(2PI) CONSTANT TO OBJECTIVE FUNCTION:    1720.2529341591473
 OBJECTIVE FUNCTION VALUE WITHOUT CONSTANT:   -4884.8734367561347
 OBJECTIVE FUNCTION VALUE WITH CONSTANT:      -3164.6205025969875
 REPORTED OBJECTIVE FUNCTION DOES NOT CONTAIN CONSTANT

 TOTAL EFFECTIVE ETAS (NIND*NETA):                            96


 #TERE:
 Elapsed estimation  time in seconds:     3.41
 Elapsed covariance  time in seconds:     2.26
 Elapsed postprocess time in seconds:     3.01

 ********************               FIRST ORDER CONDITIONAL ESTIMATION WITH INTERACTION              ********************
 #OBJT:**************                       MINIMUM VALUE OF OBJECTIVE FUNCTION                      ********************
 #OBJV:********************************************    -4884.873       **************************************************

 ********************               FIRST ORDER CONDITIONAL ESTIMATION WITH INTERACTION              ********************
 ********************                             FINAL PARAMETER ESTIMATE                           ********************

 THETA - VECTOR OF FIXED EFFECTS PARAMETERS   *********
         TH 1      TH 2      TH 3      TH 4      TH 5      TH 6
         2.16E-02  3.03E+00  4.62E-02  2.91E+00  1.03E-01  0.00E+00

 OMEGA - COV MATRIX FOR RANDOM EFFECTS - ETAS  ********
         ETA1      ETA2      ETA3      ETA4
 ETA1
+        1.42E-01
 ETA2
+        0.00E+00  1.32E-01
 ETA3
+        0.00E+00  0.00E+00  9.40E-02
 ETA4
+        0.00E+00  0.00E+00  0.00E+00  8.40E-02

 SIGMA - COV MATRIX FOR RANDOM EFFECTS - EPSILONS  ****
         EPS1
 EPS1
+        1.00E+00

 OMEGA - CORR MATRIX FOR RANDOM EFFECTS - ETAS  *******
         ETA1      ETA2      ETA3      ETA4
 ETA1
+        3.77E-01
 ETA2
+        0.00E+00  3.63E-01
 ETA3
+        0.00E+00  0.00E+00  3.07E-01
 ETA4
+        0.00E+00  0.00E+00  0.00E+00  2.90E-01

 SIGMA - CORR MATRIX FOR RANDOM EFFECTS - EPSILONS  ***
         EPS1
 EPS1
+        1.00E+00

 ********************               FIRST ORDER CONDITIONAL ESTIMATION WITH INTERACTION              ********************
 ********************                            STANDARD ERROR OF ESTIMATE                          ********************

 THETA - VECTOR OF FIXED EFFECTS PARAMETERS   *********
         TH 1      TH 2      TH 3      TH 4      TH 5      TH 6
         1.67E-03  2.28E-01  3.50E-03  1.88E-01  3.00E-03 .........

 OMEGA - COV MATRIX FOR RANDOM EFFECTS - ETAS  ********
         ETA1      ETA2      ETA3      ETA4
 ETA1
+        3.23E-02
 ETA2
+       .........  2.96E-02
 ETA3
+       ......... .........  2.91E-02
 ETA4
+       ......... ......... .........  2.30E-02

 SIGMA - COV MATRIX FOR RANDOM EFFECTS - EPSILONS  ****
         EPS1
 EPS1
+       .........

 OMEGA - CORR MATRIX FOR RANDOM EFFECTS - ETAS  *******
         ETA1      ETA2      ETA3      ETA4
 ETA1
+        4.28E-02
 ETA2
+       .........  4.08E-02
 ETA3
+       ......... .........  4.75E-02
 ETA4
+       ......... ......... .........  3.97E-02

 SIGMA - CORR MATRIX FOR RANDOM EFFECTS - EPSILONS  ***
         EPS1
 EPS1
+       .........
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
 ********************               FIRST ORDER CONDITIONAL ESTIMATION WITH INTERACTION              ********************
 ********************                      EIGENVALUES OF COR MATRIX OF ESTIMATE                     ********************

             1         2         3         4         5         6         7         8         9
         3.01E-01  3.86E-01  4.63E-01  7.56E-01  8.55E-01  9.96E-01  1.25E+00  1.79E+00  2.20E+00
 Elapsed finaloutput time in seconds:     0.05
 #CPUT: Total CPU Time in Seconds,        8.854
